# Diffusion - Migration - Potential - Nucleation - Reaction Modeling
# Cycling
# nucleation equation implementation with nucleation rate
# 6/8/23
# Madison Morey

log 		${dname}/log.lammps
dimension       2
units		micro
atom_style	meso/new
boundary        f f p

# Adding particle properties - anion concentration, change in anion concentration, cation concentration, change in cation concentration, anion mobility, cation mobility,anion diffusion coefficient, cation diffusion coefficient, reaction rate coefficient for cations at anode, surface energy for cations at anode, mass of metal, change in mass of metal, local potential, next local potential, next local potential, x-normal component, next x-normal component, y-normal component, next y-normal component, z-normal component, next z-normal component

fix             prop all property/atom d_cA d_dcA d_cC d_dcC d_muA d_muC d_DA d_DC d_RC d_surf_energy d_rR d_drR d_nN d_dnN d_mM d_dmM d_local_pot d_nx d_ny d_nz ghost yes

# Particle property values
include		vars.lmp

# Domain creation and particle spacing
lattice	        sq ${dx} origin 0.5 0.5 0
region		box block 0 ${L_x} 0 ${L_y} 0 ${dx} units box
create_box	3 box
create_atoms	1 box

# Create regions
region        rliquid    block EDGE EDGE ${anode_end} ${const_conc}  EDGE EDGE units box
region        rsolid     block EDGE EDGE EDGE ${anode_end}  EDGE EDGE units box
region        rconstconc block EDGE EDGE ${const_conc} EDGE EDGE EDGE units box
region        rinorg1    sphere ${x1} ${y1} ${z} ${r1} units box
region        rinorg2    sphere ${x2} ${y2} ${z} ${r2} units box
region        rinorg3    sphere ${x3} ${y3} ${z} ${r3} units box
region        rinorg4    sphere ${x4} ${y4} ${z} ${r4} units box
region        rinorg5    sphere ${x5} ${y5} ${z} ${r5} units box
region        rinorg6    sphere ${x6} ${y6} ${z} ${r6} units box
region        rinorg7    sphere ${x7} ${y7} ${z} ${r7} units box
region        rinorg8    sphere ${x8} ${y8} ${z} ${r8} units box
region        rinorg9    sphere ${x9} ${y9} ${z} ${r9} units box
region        rinorg10    sphere ${x10} ${y10} ${z} ${r10} units box
region        rinorg11    sphere ${x11} ${y11} ${z} ${r11} units box
region        rinorg12    sphere ${x12} ${y12} ${z} ${r12} units box
region        rinorg13    sphere ${x13} ${y13} ${z} ${r13} units box
region        rinorg14    sphere ${x14} ${y14} ${z} ${r14} units box
region        rinorg15    sphere ${x15} ${y15} ${z} ${r15} units box
region        rinorg16    sphere ${x16} ${y16} ${z} ${r16} units box
region        rinorg17    sphere ${x17} ${y17} ${z} ${r17} units box
region        rinorg18    sphere ${x18} ${y18} ${z} ${r18} units box
region        rinorg19    sphere ${x19} ${y19} ${z} ${r19} units box
region        rinorg20    sphere ${x20} ${y20} ${z} ${r20} units box
region        rinorg21    sphere ${x21} ${y21} ${z} ${r21} units box
region        rinorg22    sphere ${x22} ${y22} ${z} ${r22} units box
region        rinorg23    sphere ${x23} ${y23} ${z} ${r23} units box
region        rinorg24    sphere ${x24} ${y24} ${z} ${r24} units box
region        rinorg25    sphere ${x25} ${y25} ${z} ${r25} units box
region        rinorg26    sphere ${x26} ${y26} ${z} ${r26} units box
region        rinorg27    sphere ${x27} ${y27} ${z} ${r27} units box
region        rinorg28    sphere ${x28} ${y28} ${z} ${r28} units box


region        rinorg union 28 rinorg1 rinorg2 rinorg3 rinorg4 rinorg5 rinorg6 rinorg7 rinorg8 rinorg9 rinorg10 rinorg11 rinorg12 rinorg13 rinorg14 rinorg15 rinorg16 rinorg17 rinorg18 rinorg19 rinorg20 rinorg21 rinorg22 rinorg23 rinorg24 rinorg25 rinorg26 rinorg27 rinorg28

# Combine regions into groups
group         liquid region rliquid
group         constconc region rconstconc
group         solid	region rsolid
group         inorg   region rinorg

# Combine regions into groups
set             group liquid type 1 # liquid is 1
set             group constconc type 1
set             group solid type 2
set             group inorg type 3

displace_atoms  all random 0.2 0.2 0 798534

# Assign particle property values to regions
include		particleProp.lmp

# Set the number of cycles
#variable  	total_half_cycles equal 10
#variable  	total_cycles equal ${total_half_cycles}/2-2

#print		"**************************** Charge cycle number: 1/${total_half_cycles} *******************"


########################################################################
########################### Set fixes ##################################
################## Constant across all runs ############################
########################################################################

# Calculate normals at interface
fix             norm_calc       all sph/surfacenormal ${d}

# Constant concentration fixes for boundary
fix             constant_concentration_cA constconc sph/constant/cA ${sph_const_cA}
fix             constant_concentration_cC constconc sph/constant/cC ${sph_const_cC}

# Calculate the local potential
fix             pot_calc0        all sph/electropotential ${h} ${sph_conc_to_charge} ${sph_applied_pot_ch} 0.0 ${L_y}

# Sum the changes and precipitate/dissolve solids
fix		sum_changes_fix all sph/concentration/mass/radius
fix		precip_diss_fix all sph/precipitation/dissolution/liquidRC ${sph_mass_thres} ${sph_cCeq_ch} ${sph_cAeq_ch}

########################################################################
####################### Set pair style #################################
############## Pair style changes for cycling ##########################
########################################################################

# Initial pair style
# Allows different reaction rates to be set for different groups

pair_style      sph/twospecies/isodiffusion/migration/csr/bv/nucleation/hybrid
pair_coeff      * * ${h} ${d} ${sph_applied_pot_ch} ${sph_cC_init} ${sph_cA_init} ${sph_mass_thres} ${sph_N} ${sph_theta}


# For LAMMPS neighbor lists
neighbor        ${h} bin

# Dump fix
dump            dump_fix0 all custom ${nfreq_init} ${dname}/dump.*.dat id type x y d_cA d_dcA d_cC d_dcC d_mM d_dmM d_DC

timestep        ${dt_init}

# Print to screen
variable           time equal step*dt
thermo_style       custom step v_time
thermo             ${nfreq_init}

run             ${nrun_init}

# ####################################################################################
# ################################ Loop for running cycles ###########################
# ####################################################################################

# # a: the variable to be incremented, loop: the variable where the loop will return to
# # : the number of times a will be incrememted before the loop exits
# # Further clarification in docs (lammps.sandia.gov/doc/jump.html)

# variable      a loop ${total_cycles}
# label       loop
# variable      half_cycle_number equal ${a}*2
# print  "**************************** Discharge cycle number: ${half_cycle_number}/${total_half_cycles} *******************"
